I_c_max := 0.2
V_cc := 12
h_21_max := 300
I_c_work := 0.02
P_tr_max := 0.35
U_ce_max := 40
i := 1 .. 40
U_ce_plt[i] := i
I_c[i] := P_tr_max/U_ce_plt[i]
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IV_in := READPRN("input.DNO")
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IV_out := READPRN("output.DNO")
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IV_out := READPRN("output.DNO")
k := 1 .. 2
A[1] := V_cc*I_c_work/(V_cc - V_cc/2)
A[2] := 0
B[1] := 0
B[2] := 12
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